// SBML level 3 version 2

model PBK_Cd()
  // model units - substance: MicroGM, time: DAY, volume: L, area: area, extent: MicroGM

  // Compartments:
  compartment Liver = 1 L; Liver is "liver";
  compartment Kidney = 1 L; Kidney is "kidney";
  compartment Others = 1 L; Others is "other tissues";
  compartment Creatinine = 0.032 L;
  compartment Feces = 1 L; Feces is "feces";
  compartment Urine = 2 L; Urine is "urine";
  compartment Intestine = 1 L; Intestine is "intestine";
  compartment Gut = 1 L; Gut is "gut";
  compartment Lung = 1 L; Lung is "lung";
  compartment Expo = 1 L; Expo is "total systemic exposure";
  compartment Excretion = 1 L; Excretion is "excreta";
  compartment Blood1 = 1 L; Blood1 is "plasma";
  compartment Blood2 = 1 L; Blood2 is "red blood cells";
  compartment Blood3 = 1 L; Blood3 is "metallothionein";

  // Species:
  species QExpo in Expo = 0;
  species QGut in Gut = 0; QGut is "Amount in gut";
  species QLiver in Liver = 0; QLiver is "Amount in liver";
  species QKidney in Kidney = 0; QKidney is "Amount in kidney";
  species QLung in Lung = 0; QLung is "Amount in lungs";
  species QUrine in Urine = 0; QUrine is "Amount in urine";
  species QFeces in Feces = 0; QFeces is "Amount in feces";
  species QIntestine in Intestine = 0; QIntestine is "Amount in intestine";
  species QBlood1 in Blood1 = 0; QBlood1 is "Amount in plasma";
  species QBlood2 in Blood2 = 0; QBlood2 is "Amount in red blood cells";
  species QBlood3 in Blood3 = 0; QBlood3 is "Amount in metallothionein";
  species QOthers in Others = 0; QOthers is "amount in other tissues";

  // Parameters:
  BW has kg; BW is "body weight";
  Age has YR; Age is "age";
  DeltaBW = 1 UNITLESS;
  Age_init = 0 YR;
  C1_cig = 0.1;
  C1_dust = 0.7;
  C2_cig = 0.4;
  C2_dust = 0.13;
  C3 = 0.05 PER_DAY; C3 is "Rate of transfer of inhalation intake to uptake pool";
  C4 = 0.005 PER_DAY; C4 is "Rate of transfer of air Cd to the GI-tract";
  C5 = 0.048 UNITLESS; C5 is "Fraction of GI-tract Cd retained in epithelium";
  C6 = 0.05 PER_DAY; C6 is "Rate of transfer of Cd in the GI-tract to uptake pool";
  C7 = 0.25 UNITLESS; C7 is "Fraction of uptake pool transferred to blood";
  C8 = 1000 MicroGM; C8 is "Maximum mass of Cd in uptake pool";
  C9 = 0.44 PER_DAY; C9 is "Rate of transfer from plasma to other tissues";
  C10 = 0.00014 PER_DAY; C10 is "Rate of transfer of Cd in other tissues to plasma";
  C11 = 0.27 PER_DAY; C11 is "Rate of transfer of Cd in plasma to feces";
  C12 = 0.25 PER_DAY; C12 is "Rate of transfer of Cd in plasma to liver";
  C13 = 3e-5 PER_DAY; C13 is "Rate of transfer of Cd in liver to plasma";
  C14 = 0.00016 PER_DAY; C14 is "Rate of transfer of Cd in liver to metallothionein";
  C15 = 5e-5 PER_DAY; C15 is "Rate of transfer of Cd in liver to feces";
  C16 = 0.012 PER_DAY; C16 is "Rate of transfer of Cd in blood red blodd cells to metallothionein";
  C17 has PER_DAY; C17 is "Rate of transfer of Cd in metallothionein to kidney";
  C18 = 1e-5 PER_DAY; C18 is "Rate of transfer of Cd in kidney to plasma";
  C19 has PER_DAY; C19 is "Age-specific rate constant for transfer of Cd in kidney to urine";
  C21 = 1.1e-6; C21 is "Increased transfer of Cd from kidney to urine after age 30";
  C20 = 0.1 UNITLESS; C20 is "Fraction of Cd in plasma and red blood cells that contribute to cadmium in whole blood";
  CX = 0.04 PER_DAY; CX is "Rate of transfer of Cd in B1 to blood B2";
  VCreat has g;
  CUrine = 0 MicroGM;
  QAir = 0;
  QExcretion = 0 MicroGM; QExcretion is "total excretion amount (urine+feces)";

  // Assignment rules:
  BW := (3.938425 + 0.7518199*Age*12 - 0.02023793*(Age*12)^2 + 0.0002921682*(Age*12)^3 - 2.06762e-6*(Age*12)^4 + 8.469e-9*(Age*12)^5 - 2.188427e-11*(Age*12)^6 + 3.699776e-14*(Age*12)^7 - 4.099077e-17*(Age*12)^8 + 2.874804e-20*(Age*12)^9 - 1.159732e-23*(Age*12)^10 + 2.052602e-27*(Age*12)^11)*DeltaBW;
  Age := Age_init + time/365;
  I2 := piecewise(C7*QExpo, C7*QExpo < C8, C8);
  C17 := piecewise(0.95, Age < 30, 0.95 - 0.95/3*(Age - 30)/50);
  C19 := piecewise(0.00014, Age < 30, 0.00014 + C21*(Age - 30));
  VCreat := piecewise(0.032 + 0.02098*Age + 0.009104*Age^2 - 0.000455*Age^3 + 7.578e-6*Age^4 - 4.232e-8*Age^5, Age < 70, 0.032 + 0.02098*70 + 0.009104*70^2 - 0.000455*70^3 + 7.578e-6*70^4 - 4.232e-8*70^5);

  // Reactions:
  _J0: QGut -> QIntestine; (QGut + QLung*C4)*C5;  // modifiers: QLung
  _J1: QLung -> QExpo; QLung*C3;
  _J2: QIntestine -> QExpo; QIntestine*C6;
  _J3: QExpo -> QBlood3; I2;
  _J4: QExpo -> QBlood1; QExpo - I2;
  _J5: QBlood1 -> QOthers; QBlood1*C9;
  _J6: QBlood1 -> QBlood2; QBlood1*CX;
  _J7: QOthers -> QBlood1; QOthers*C10;
  _J8: QBlood1 -> QFeces; QBlood1*C11;
  _J9: QBlood1 -> QLiver; QBlood1*C12;
  _J10: QLiver -> QBlood1; QLiver*C13;
  _J11: QLiver -> QBlood3; QLiver*C14;
  _J12: QLiver -> QFeces; QLiver*C15;
  _J13: QBlood2 -> QBlood3; QBlood2*C16;
  _J14: QBlood3 -> QKidney; QBlood3*C17;
  _J15: QKidney -> QBlood1; QKidney*C18;
  _J16: QKidney -> QUrine; QKidney*C19;
  _J17: QBlood3 -> QUrine; QBlood3*(1 - C17);

  // Unit definitions:
  unit day = 86400 second;
  unit substance = 1e-6 gram;
  unit microg_kg = 1e-6 gram / (1000 gram);
  unit volume = litre;
  unit kg = 1000 gram;
  unit g = gram;
  unit area = 1;
  unit m = 1;
  unit MicroGM = 1e-6 gram;
  unit DAY = 86400 second;
  unit L = litre;
  unit YR = 3.15576e7 second;
  unit UNITLESS = dimensionless;
  unit PER_DAY = 1 / (86400 second);
end
